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/batch
! ANSYS input file written by Workbench version 19.1 RELEASE
! File used for geometry attach: F:\PhD\06_Paper\vvv_IEEE_Humanoid2018\StrainGauge\02_Ansys\01_Weight_Test\00.Weight Test_files\dp0\SYS\DM\SYS.scdoc
/title,00.Weight Test--Static Structural (A5)
/com,--- Data in consistent MKS units. See Solving Units in the help system for more information.
/units,MKS
/prep7
! Turn off shape checking because checks already performed inside WB mesher.
! See help system for more information.
SHPP,OFF,,NOWARN
etcon,set             ! allow ANSYS to choose best KEYOP's for 180x elements
/com,*********** Nodes for the whole assembly ***********
nblock,3,,24512
(1i9,3e20.9e3)
        1    -7.120336542E-03     1.447684353E-01    -3.348574648E-02
        2    -7.157362929E-03     1.447804035E-01    -3.365751199E-02
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-1
/com,*********** Elements for Body 1 "00 Shin Modified\Solid1" ***********
et,1,187
eblock,19,solid,,10729
(19i9)
        1        1        1        1        0        0        0        0       10        0        1     1837     3823     3644     3334    16832    22080    16830    16828
    21623    21622
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-1
/com,*********** Send User Defined Coordinate System(s) ***********
csys,0
toffst,273.15,  ! Temperature offset from absolute zero
/com,*********** Set Reference Temperature ***********
tref,22.
/com,*********** Send Materials ***********
MP,DENS,1,930,	! kg m^-3
MP,EX,1,1700000000,	! Pa
MP,NUXY,1,0.394,

!************************* Model Summary ********************
!00 Shin Modified\Solid1,	PA2200,	matid,	1
!************************* End Model Summary ********************
CMBLOCK,SELECTION,NODE,        1
(8i10)
      2984
/com,*********** Fixed Supports ***********
CMBLOCK,_FIXEDSU,NODE,      208
(8i10)
        48        49        50        51        52        53        54        55
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
cmsel,s,_FIXEDSU
d,all,all
nsel,all
/com,*********** Create Direct FE , Forces ****
CMBLOCK,_CM94F  ,NODE,        1
(8i10)
      2984

*DIM,_loadvari94x,TABLE,2,1,1,TIME,
! Time values
_loadvari94x(1,0,1) = 0.
_loadvari94x(2,0,1) = 1.
! Load values
_loadvari94x(1,1,1) = 0.
_loadvari94x(2,1,1) = 10.


*DIM,_loadvari94y,TABLE,2,1,1,TIME,
! Time values
_loadvari94y(1,0,1) = 0.
_loadvari94y(2,0,1) = 1.
! Load values
_loadvari94y(1,1,1) = 0.
_loadvari94y(2,1,1) = 0.


*DIM,_loadvari94z,TABLE,2,1,1,TIME,
! Time values
_loadvari94z(1,0,1) = 0.
_loadvari94z(2,0,1) = 1.
! Load values
_loadvari94z(1,1,1) = 0.
_loadvari94z(2,1,1) = -15.

fini
/com,****************************************************************************
/com,*************************    SOLUTION       ********************************
/com,****************************************************************************
/solu
antype,0                   ! static analysis
eqsl,sparse,,,,,1
cntr,print,1               ! print out contact info and also make no initial contact an error
dmpoption,emat,no             ! Don't combine emat file for DANSYS
dmpoption,esav,no             ! Don't combine esav file for DANSYS
nldiag,cont,iter           ! print out contact info each equilibrium iteration
rescontrol,,none                 ! Do not keep any restart files
/com,****************************************************
/com,******************* SOLVE FOR LS 1 OF 1 ****************
/com,**** Set Direct FE , Forces ****
f,_CM94F,fx,%_loadvari94x%
f,_CM94F,fy,%_loadvari94y%
f,_CM94F,fz,%_loadvari94z%
nsub,1,1,1
time,1.
outres,erase
outres,all,none
outres,nsol,all,
outres,rsol,all
outres,strs,all,
outres,epel,all,
outres,eppl,all,
stabilize,off                   ! Stabilization turned OFF by user
! *********** WB SOLVE COMMAND ***********
! check interactive state
*get,ANSINTER_,active,,int
*if,ANSINTER_,ne,0,then
/eof
*endif
solve
/com *************** Write FE CONNECTORS *********
CEWRITE,file,ce,,INTE
/com,****************************************************
/com,*************** FINISHED SOLVE FOR LS 1 *************
/post1
fini
